# Переменные задачи (матрица перевозки)
X == [x_11, x_12, x_13, x_14; x_21, x_22, x_23, x_24; x_31, x_32, x_33, x_34; x_41, x_42, x_43, x_44]
# Матрица стоимостей
C == [1, 2, 1, 3; 2, 4, 5, 8; 3, 5, 6, 9; 4, 6, 7, 10]
# Целевая функция задачи
x_ij ≥ 0
i := 1, 2 .. 4
j := 1, 2 .. 4
Z == 1*x_11 + 2*x_12 + 1*x_13 + 3*x_14 + 2*x_21 + 4*x_22 + 5*x_23 + 8*x_24 + 3*x_31 + 5*x_32 + 6*x_33 + 9*x_34 + 4*x_41 + 6*x_42 + 7*x_43 + 10*x_44
x_11 + x_12 + x_13 + x_14 == 70
x_21 + x_22 + x_23 + x_24 == 140
x_31 + x_32 + x_33 + x_34 == 210
x_41 + x_42 + x_43 + x_44 == 210
