d/dx1((9*x1 - 10)^2 + (0.1*x2 + 10)^2) → 162*x1 - 180
[-180; 2.1]
d/dx2((9*x1 - 10)^2 + (0.1*x2 + 10)^2) → 0.02*x2 + 2.0
d/dθ((9*(0 + 180*θ) - 10)^2 + (0.1*(5 - 2.1*θ + 10)^2)) → 5.248800882*10^6*θ - 32406.3
5.248800882*10^6*θ - 32406.3 == 0 solve, θ → 0.00617403874305
d/dθ(5.248800882*10^6*θ - 32406.3) → 5.248800882*10^6
5.248800882*10^6 > 0
# Решение задачи φ(θ) -> min, θ>=0 и θ1 = 0.00617403874305
x := sqrt([0; 5] - 0.00617403874305*[-180; 2.1])
x^2 = [1.11133; 4.98703]
# Применение метода Ньютона
d^2*f(x)/dx^2 == [162, 0; 0, 0.02]
d^2*f(x)^-1/dx^2 == [1/162, 0; 0, 50]
l := -[1/162, 0; 0, 50]*[-180; 2.1] = [1.11111; -105]
xx := [0; 5] + [1.111; -105] = [1.111; -100]
