# Все модели надёжности ПО можно разделить на 2 класса : иерархические и математические.
# 1) Иерархические модели ПО позволяют выполнить интегральную количественную оценку надёжности ПС, учитывающиую различные критерии надёжности.
# 2) Метематические модели ПО позволяют определить оценки показателей надёжности ПО: вероятность безотказной работы P(t), интенсивность отказов λ(t), математическое ожидание времени наработки на отказ m[t], число ошибок до начала тестирования E[0] и др.
# Здесь рассматриваются математические модели.
# Математические модели используют различные критерии дли оценки надёжности ПО:
# 1) Интервалы времени между отказами ПО (Джелинского-Моранды, Шика-Волвертона, геометрическая модели)
# 2) Внесённые искусственно в ПО ошибки (модель Миллса)
# 3) Пространство входных данных (модель Нельсона)
# !!!!!Все модели имеют допущения.
# Модель Джелинского-Моранды (модель JM)
# Допущения модели:
# 1) Время до очередного отказа распределено по экспоненциальному закону
# 2) Все ошибки равновероятны и их появление не зависит друг от друга
# 3) Частота появления ошибок (интенсивность отказов, функия риска) пропорциональна числу не выявленных ошибок:
# λ(t[i]) == K[jm]*[E[0] - (i - 1)],
# где E[0] - число ошибок в ПО до начала тестирования и отладки;
# K[jm] - коэффициент Джелинского-Моранды;
# t[i] - интервал времени между (i-1)-й и i-й обнаруженными ошибками;
# i - число ошибок, обнаруженных  к моменту отладки t[i]
# 4) λ(t[i])= const на интервале между двумя смежными моментами появления ошибок
# 5) Каждая обнаруженная ошибка в ПО немедленно устраняется и число оставшихся ошибок уменьшается на 1;
# 6) Ошибки корректируются без внесения новых ошибок.
# Модель Шика-Волвертона
# Является модификацией модели JM.
# Дополнительно к допущениями Модели JM используется следующее допущение:
# 1) Частота появления ошибок пропорциональна времени отладки программы t[i], т.е. вероятность обнаружения ошибок с течением времени должна возрастать.
# λ(t[i]) == K[sw]*(E[0] - (i - 1))*t[i]
# Геометрическая модель (предложена Морандой)
# В данной модели предполагается, что исходное число ошибок в программе - величина не фиксированная, более того все ошибки не равновероятны. Считается, что по мере
# отладки обнаруживать ошибки становится всё труднее, таким образом, ПО никогда не освобождается от ошибок.
# Основные исходные предпосылки (допущения?):
# 1) Общее число ошибок неограниченно;
# 2) Обнаружение ошибок не равновероятно;
# 3) Обнаружение ошибок - процесс, который не зависит от ошибок;
# 4) ПО работает в условиях, близким к реальным;
# 5) Интенсивность обнаружения ошибок образует геометрическую прогрессию и она в интервале между появлениями ошибок постоянна.
# Интенсивность ошибок имеет следующий вид:
λ(t[i]) == D*K^(i - 1)
# где λ(0) == D - исходное значение интенсивности отказов;
# K - константа пропорциональности 0 < K < 1
# t[i] - время между появлениями (i-1)-ой и i-ой обнаруженных ошибок.
# Статическая модель Миллса:
# В модели не делается предположений о поведении интенсивности отказов.
# 1) Программа засоряется накоторым известным количеством ошибок
# 2) Делается предположение, что для собственных и внесённых ошибок вероятность их обнаружения при последующем  тестировании одинакова.
# 3)
1
